# OpenSim document version 30000
ForceSet:
  PointActuator FX_residual: body=pelvis point=(-0.07769044 0 0) direction=(1 0 0) force_is_global=true
      optimal_force=100
  PointActuator FY_residual: body=pelvis point=(-0.07769044 0 0) direction=(0 1 0) force_is_global=true
      optimal_force=100
  PointActuator FZ_residual: body=pelvis point=(-0.07769044 0 0) direction=(0 0 1) force_is_global=true
      optimal_force=100
  TorqueActuator MX_residual: bodyA=pelvis bodyB=ground torque_is_global=true axis=(1 0 0) optimal_force=100
  TorqueActuator MY_residual: bodyA=pelvis bodyB=ground torque_is_global=true axis=(0 1 0) optimal_force=100
  TorqueActuator MZ_residual: bodyA=pelvis bodyB=ground torque_is_global=true axis=(0 0 1) optimal_force=100
  CoordinateActuator hip_flexion_r_reserve: coordinate=hip_flexion_r optimal_force=1
  CoordinateActuator hip_adduction_r_reserve: coordinate=hip_adduction_r optimal_force=1
  CoordinateActuator hip_rotation_r_reserve: coordinate=hip_rotation_r optimal_force=1
  CoordinateActuator knee_angle_r_reserve: coordinate=knee_angle_r optimal_force=1
  CoordinateActuator ankle_angle_r_reserve: coordinate=ankle_angle_r optimal_force=1
  CoordinateActuator hip_flexion_l_reserve: coordinate=hip_flexion_l optimal_force=2.5
  CoordinateActuator hip_adduction_l_reserve: coordinate=hip_adduction_l optimal_force=5
  CoordinateActuator hip_rotation_l_reserve: coordinate=hip_rotation_l optimal_force=10
  CoordinateActuator knee_angle_l_reserve: coordinate=knee_angle_l optimal_force=2.5
  CoordinateActuator ankle_angle_l_reserve: coordinate=ankle_angle_l optimal_force=2.5
