# OpenSim document version 30000
ExternalLoads:
  datafile: 1_data/GC5_ss3_kinetics.mot
  lowpass_cutoff_frequency_for_load_kinematics: -1
  ExternalForce GRF1: applied_to_body=calcn_l force_expressed_in_body=ground point_expressed_in_body=ground
      force_identifier=1_ground_force_v point_identifier=1_ground_force_p torque_identifier=1_ground_torque_
  ExternalForce GRF2: applied_to_body=calcn_r force_expressed_in_body=ground point_expressed_in_body=ground
      force_identifier=2_ground_force_v point_identifier=2_ground_force_p torque_identifier=2_ground_torque_
  ExternalForce GRF3: applied_to_body=calcn_r force_expressed_in_body=ground point_expressed_in_body=ground
      force_identifier=3_ground_force_v point_identifier=3_ground_force_p torque_identifier=3_ground_torque_
