# OpenSim document version 40000
MarkerSet:
  Marker Sternum: torso (0.0400997 0.372474 0)
  Marker Neck: torso (-0.07707 0.423049 0)
  Marker RShoulder: torso (-0.0347554 0.395333 0.127678)
  Marker LShoulder: torso (-0.0347554 0.395333 -0.127678)
  Marker Xiphoid: torso (0.0972507 0.20449 2.76776e-5)
  Marker Thoracic: torso (-0.0997427 0.188327 0)
  Marker Lumbar: torso (-0.0549952 0.0195685 0)
  Marker Sacral: pelvis (-0.153367 0.044177 0)
  Marker RAsis: pelvis (0.0111929 0.00559914 0.128042)
  Marker LAsis: pelvis (0.0111929 0.00559914 -0.128042)
  Marker RPsis: pelvis (-0.153367 0.044177 0.0570674)
  Marker LPsis: pelvis (-0.153367 0.044177 -0.0570674)
  Marker RThighSuperior: femur_r (-0.0123278 -0.0725902 0.0984354)
  Marker RThighInferior: femur_r (0.0133832 -0.339018 0.0687005)
  Marker RThighLateral: femur_r (0.0652844 -0.217963 -0.0119513)
  Marker RKneeLateral: femur_r (0.00726741 -0.405476 0.055611)
  Marker RKneeMedial: femur_r (0.00945261 -0.396196 -0.0603257)
  Marker RPatella: tibia_r (0.0593292 -0.0202097 0.00239979)
  Marker RShankSuperior: tibia_r (0.0101409 -0.115717 0.0553648)
  Marker RShankInferior: tibia_r (0.00235316 -0.374825 0.0496735)
  Marker RShankLateral: tibia_r (0.0384594 -0.264305 -0.0222079)
  Marker RAnkleLateral: tibia_r (-0.00817003 -0.407847 0.0547417)
  Marker RankleMedial: tibia_r (0.00334829 -0.402966 -0.039792)
  Marker RHeel: calcn_r (-0.0243635 0.0359912 -0.00862702)
  Marker RMidfootMedial: calcn_r (0.171399 0.00159386 -0.0481575)
  Marker RMidfootLateral: calcn_r (0.13629 0.00332424 0.0554036)
  Marker RMidfootSuperior: calcn_r (0.120173 0.0490052 0.00518202)
  Marker RHindfoot: calcn_r (0.0903589 0.0118254 0.0505006)
  Marker RToeMedial: toes_r (0.0399488 -0.00173065 -0.0441897)
  Marker RToeLateral: toes_r (0.00647044 0.0010064 0.0618423)
  Marker RToe: toes_r (0.0893157 0.0181837 0.0107205)
  Marker LThighSuperior: femur_l (-0.0123278 -0.0725902 -0.0984354)
  Marker LThighInferior: femur_l (0.0133832 -0.339018 -0.0687005)
  Marker LThighLateral: femur_l (0.0652844 -0.217963 0.0119513)
  Marker LKneeLateral: femur_l (0.00726741 -0.405476 -0.055611)
  Marker LKneeMedial: femur_l (0.00945261 -0.396196 0.0603257)
  Marker LPatella: tibia_l (0.0593292 -0.0202097 -0.00239979)
  Marker LShankSuperior: tibia_l (0.0101409 -0.115717 -0.0553648)
  Marker LShankInferior: tibia_l (0.00235316 -0.374825 -0.0496735)
  Marker LShankLateral: tibia_l (0.0384594 -0.264305 0.0222079)
  Marker LAnkleLateral: tibia_l (-0.00817003 -0.407847 -0.0547417)
  Marker LAnkleMedial: tibia_l (0.00334829 -0.402966 0.039792)
  Marker LHeel: calcn_l (-0.0243635 0.0359912 0.00862702)
  Marker LMidfootMedial: calcn_l (0.171399 0.00159386 0.0481575)
  Marker LMidfootLateral: calcn_l (0.13629 0.00332424 -0.0554036)
  Marker LMidfootSuperior: calcn_l (0.120173 0.0490052 -0.00518202)
  Marker LHindfoot: calcn_l (0.0903589 0.0118254 -0.0505006)
  Marker LToeMedial: toes_l (0.0399488 -0.00173065 0.0441897)
  Marker LToeLateral: toes_l (0.00647044 0.0010064 -0.0618423)
  Marker LToe: toes_l (0.0893157 0.0181837 -0.0107205)
