# OpenSim document version 30000
ScaleTool Rajagopalv3_GC5_og_ss1:
  mass: 75 [kg]
  height: -1
  age: -1
  GenericModelMaker:
    model_file: Rajagopalv3.osim
    marker_set_file: MarkerSet.xml
  ModelScaler:
    apply: true
    scaling_order: measurements manualScale
    marker_file: scaling.trc
    time_range: 0 5.8
    preserve_mass_distribution: true
    output_model_file: scaled.osim
    output_scale_file: Results/Applied_Scale.xml
    MeasurementSet:
      Measurement torso: apply=true
        MarkerPair: markers=(LShoulder Sacral)
        MarkerPair: markers=(RShoulder Sacral)
        BodyScale torso: axes=(X Y Z)
      Measurement pelvis: apply=true
        MarkerPair: markers=(RAsis LAsis)
        BodyScale pelvis: axes=(X Y Z)
      Measurement femur: apply=true
        MarkerPair: markers=(LAsis LKneeMedial)
        MarkerPair: markers=(RAsis RKneeMedial)
        BodyScale femur_r: axes=(X Y Z)
        BodyScale patella_r: axes=(X Y Z)
        BodyScale femur_l: axes=(X Y Z)
        BodyScale patella_l: axes=(X Y Z)
      Measurement tibia: apply=true
        MarkerPair: markers=(LKneeLateral LAnkleLateral)
        MarkerPair: markers=(RKneeLateral RAnkleLateral)
        BodyScale tibia_r: axes=(X Y Z)
        BodyScale tibia_l: axes=(X Y Z)
      Measurement foot: apply=true
        MarkerPair: markers=(LHeel LToe)
        MarkerPair: markers=(RHeel RToe)
        BodyScale talus_r: axes=(X Y Z)
        BodyScale calcn_r: axes=(X Y Z)
        BodyScale toes_r: axes=(X Y Z)
        BodyScale talus_l: axes=(X Y Z)
        BodyScale calcn_l: axes=(X Y Z)
        BodyScale toes_l: axes=(X Y Z)
    ScaleSet:
      Scale: scales=(1.03 1.03 1.03) segment=tibia_r apply=false
      Scale: scales=(1.03 1.03 1.03) segment=tibia_l apply=false
      Scale: scales=(1.05 1.05 1.05) segment=torso apply=false
  MarkerPlacer:
    apply: true
    marker_file: scaling.trc
    time_range: 0 5.8
    output_motion_file: Results/static_output.mot
    output_model_file: scaled.osim
    output_marker_file: Results/static_output.mot
    max_marker_movement: -1
    IKTaskSet:
      IKMarkerTask Sternum: apply=false weight=1
      IKMarkerTask RShoulder: apply=true weight=15
      IKMarkerTask LShoulder: apply=true weight=15
      IKMarkerTask Xiphoid: apply=false weight=1
      IKMarkerTask Thoracic: apply=false weight=1
      IKMarkerTask Lumbar: apply=false weight=1
      IKMarkerTask Sacral: apply=true weight=20
      IKMarkerTask RAsis: apply=true weight=20
      IKMarkerTask LAsis: apply=true weight=20
      IKMarkerTask RPsis: apply=true weight=20
      IKMarkerTask LPsis: apply=true weight=20
      IKMarkerTask RThighSuperior: apply=false weight=1
      IKMarkerTask RThighInferior: apply=false weight=1
      IKMarkerTask RThighLateral: apply=false weight=1
      IKMarkerTask RKneeLateral: apply=true weight=7
      IKMarkerTask RKneeMedial: apply=true weight=3
      IKMarkerTask RPatella: apply=false weight=1
      IKMarkerTask RShankSuperior: apply=false weight=1
      IKMarkerTask RShankInferior: apply=false weight=1
      IKMarkerTask RShankLateral: apply=false weight=1
      IKMarkerTask RAnkleLateral: apply=true weight=7
      IKMarkerTask RankleMedial: apply=false weight=9
      IKMarkerTask RHeel: apply=true weight=7
      IKMarkerTask RMidfootMedial: apply=true weight=5
      IKMarkerTask RMidfootLateral: apply=false weight=5
      IKMarkerTask RMidfootSuperior: apply=false weight=1
      IKMarkerTask RHindfoot: apply=false weight=1
      IKMarkerTask RToeMedial: apply=false weight=1
      IKMarkerTask RToeLateral: apply=false weight=1
      IKMarkerTask RToe: apply=true weight=5
      IKMarkerTask LThighSuperior: apply=false weight=1
      IKMarkerTask LThighInferior: apply=false weight=1
      IKMarkerTask LThighLateral: apply=false weight=1
      IKMarkerTask LKneeLateral: apply=true weight=7
      IKMarkerTask LKneeMedial: apply=false weight=3
      IKMarkerTask LPatella: apply=false weight=1
      IKMarkerTask LShankSuperior: apply=false weight=1
      IKMarkerTask LShankInferior: apply=false weight=1
      IKMarkerTask LShankLateral: apply=false weight=1
      IKMarkerTask LAnkleLateral: apply=true weight=7
      IKMarkerTask LAnkleMedial: apply=false weight=9
      IKMarkerTask LHeel: apply=true weight=7
      IKMarkerTask LMidfootMedial: apply=true weight=5
      IKMarkerTask LMidfootLateral: apply=false weight=5
      IKMarkerTask LMidfootSuperior: apply=false weight=1
      IKMarkerTask LHindfoot: apply=false weight=1
      IKMarkerTask LToeMedial: apply=false weight=1
      IKMarkerTask LToeLateral: apply=false weight=1
      IKMarkerTask LToe: apply=true weight=5
